x := 0.6
n := 10 .. 15
n*sqrt(n*x)*nthroot(x^2, 3) + sum(ln(sqrt(x^2))/(2 - 1/k), k = 1 .. n) = [14.3262; 16.7366; 19.2729; 21.9293; 24.7012; 27.5842]
x := 0.85
n*sqrt(n*x)*nthroot(x^2, 3) + sum(ln(sqrt(x^2))/(2 - 1/k), k = 1 .. n) = [25.1751; 29.1107; 33.2337; 37.5363; 42.0112; 46.6522]
x := 1.1
n*sqrt(n*x)*nthroot(x^2, 3) + sum(ln(sqrt(x^2))/(2 - 1/k), k = 1 .. n) = [35.9202; 41.4019; 47.1362; 53.1124; 59.321; 65.7536]
