x := -0.3, -0.25 .. 0.65 = [-0.3; -0.25; -0.2; -0.15; -0.1; -0.05; 0; 0.05; 0.1; 0.15; 0.2; 0.25; 0.3; 0.35; 0.4; 0.45; 0.5; 0.55; 0.6; 0.65]
y := sum((x^(4*k + 1))/(4*k + 1)!, k = 0 .. 2)
[1; 2; 3; 4; 5; 6; 7; 8; 9; 10; 11; 12; 13; 14; 15; 16; 17; 18; 19; 20]
x = [-0.3; -0.25; -0.2; -0.15; -0.1; -0.05; 0; 0.05; 0.1; 0.15; 0.2; 0.25; 0.3; 0.35; 0.4; 0.45; 0.5; 0.55; 0.6; 0.65]
[1; 2; 3; 4; 5; 6; 7; 8; 9; 10; 11; 12; 13; 14; 15; 16; 17; 18; 19; 20]
x = [-0.3; -0.25; -0.2; -0.15; -0.1; -0.05; 0; 0.05; 0.1; 0.15; 0.2; 0.25; 0.3; 0.35; 0.4; 0.45; 0.5; 0.55; 0.6; 0.65]
y = [-0.30002; -0.250008; -0.200003; -0.150001; -0.1; -0.05; 0; 0.05; 0.1; 0.150001; 0.200003; 0.250008; 0.30002; 0.350044; 0.400085; 0.450154; 0.50026; 0.550419; 0.600648; 0.650967]
[
    0*.000100;
    0*.000100;
    0*.000100;
    0*.000100;
    0*.000100;
    0*.000100;
    0*.000100;
    0*.000100;
    0*.000100;
    0*.000100;
    0*.000100;
    0*.000100;
    0*.000100;
    0*.000100;
    0*.000100;
    0*.000100;
    0*.000100;
    0*.000100;
    0*.000100;
    0*.000100
]
[1; 2; 3; 4; 5; 6; 7; 8; 9; 10; 11; 12; 13; 14; 15; 16; 17; 18; 19; 20]
x = [-0.3; -0.25; -0.2; -0.15; -0.1; -0.05; 0; 0.05; 0.1; 0.15; 0.2; 0.25; 0.3; 0.35; 0.4; 0.45; 0.5; 0.55; 0.6; 0.65]
y = [-0.30002; -0.250008; -0.200003; -0.150001; -0.1; -0.05; 0; 0.05; 0.1; 0.150001; 0.200003; 0.250008; 0.30002; 0.350044; 0.400085; 0.450154; 0.50026; 0.550419; 0.600648; 0.650967]
[
    0*.000010;
    0*.000010;
    0*.000010;
    0*.000010;
    0*.000010;
    0*.000010;
    0*.000010;
    0*.000010;
    0*.000010;
    0*.000010;
    0*.000010;
    0*.000010;
    0*.000010;
    0*.000010;
    0*.000010;
    0*.000010;
    0*.000010;
    0*.000010;
    0*.000010;
    0*.000010
]
[1; 2; 3; 4; 5; 6; 7; 8; 9; 10; 11; 12; 13; 14; 15; 16; 17; 18; 19; 20]
x = [-0.3; -0.25; -0.2; -0.15; -0.1; -0.05; 0; 0.05; 0.1; 0.15; 0.2; 0.25; 0.3; 0.35; 0.4; 0.45; 0.5; 0.55; 0.6; 0.65]
y = [-0.30002; -0.250008; -0.200003; -0.150001; -0.1; -0.05; 0; 0.05; 0.1; 0.150001; 0.200003; 0.250008; 0.30002; 0.350044; 0.400085; 0.450154; 0.50026; 0.550419; 0.600648; 0.650967]
[
    0*.000001;
    0*.000001;
    0*.000001;
    0*.000001;
    0*.000001;
    0*.000001;
    0*.000001;
    0*.000001;
    0*.000001;
    0*.000001;
    0*.000001;
    0*.000001;
    0*.000001;
    0*.000001;
    0*.000001;
    0*.000001;
    0*.000001;
    0*.000001;
    0*.000001;
    0*.000001
]
